# OpenSim document version 30000
Model WU Shoulder Model:
  gravity: 0 -9.8 0
  defaults: Thelen2003Muscle default: max_isometric_force=546 optimal_fiber_length=0.0535 tendon_slack_length=0.078
      pennation_angle_at_optimal=0.1396263 [radians] max_contraction_velocity=10 default_activation=1
  BodySet:
    Body ground: mass=0 mass_center=(0 0 0) inertia_xx=0 inertia_yy=0 inertia_zz=0
    Body thorax: mass=20 mass_center=(-0.03 0.32 0) inertia_xx=1.4745 inertia_yy=0.7555 inertia_zz=1.4314
        meshes=(thorax.vtp hat_spine.vtp)
      CustomJoint ground_thorax: parent_body=ground location_in_parent=(0 0 0) location=(0 0 0)
        Coordinate thorax_tilt: motion_type=rotational default_value=0 range=(-1.5708 1.5708) clamped=false
        Coordinate thorax_list: motion_type=rotational default_value=0 range=(-1.5708 1.5708) clamped=false
        Coordinate thorax_rotation: motion_type=rotational default_value=0 range=(-1.5708 1.5708) clamped=false
        Coordinate thorax_tx: motion_type=translational default_value=0 range=(-20 20) clamped=false
        Coordinate thorax_ty: motion_type=translational default_value=0 range=(-2 4) clamped=false
        Coordinate thorax_tz: motion_type=translational default_value=0 range=(-5 5) clamped=false
        SpatialTransform:
          TransformAxis rotation1: coordinates=thorax_tilt axis=(0 0 1) LinearFunction(coefficients=1 0)
          TransformAxis rotation2: coordinates=thorax_list axis=(1 0 0) LinearFunction(coefficients=1 0)
          TransformAxis rotation3: coordinates=thorax_rotation axis=(0 1 0) LinearFunction(coefficients=1 0)
          TransformAxis translation1: coordinates=thorax_tx axis=(1 0 0)
              MultiplierFunction(scale=1, LinearFunction(coefficients=1 0))
          TransformAxis translation2: coordinates=thorax_ty axis=(0 1 0)
              MultiplierFunction(scale=1, LinearFunction(coefficients=1 0))
          TransformAxis translation3: coordinates=thorax_tz axis=(0 0 1)
              MultiplierFunction(scale=1, LinearFunction(coefficients=1 0))
      WrapCylinder SpineCyl: xyz_body_rotation=(1.57 0 0) translation=(-0.0469 0.09009 0.0182) quadrant=all
          radius=0.015 length=0.08
      WrapCylinder SpineCyl2: xyz_body_rotation=(1.57 -1.2 0) translation=(-0.0469 0.03009 0.024) active=false
          quadrant=all radius=0.02 length=0.15
      WrapCylinder SpineCyl3: xyz_body_rotation=(1.57 -0.21 0) translation=(-0.0859 -0.07509 0.024) quadrant=all
          radius=0.02 length=0.19
      WrapCylinder SpineCyl_t1: xyz_body_rotation=(1.57 -1.2 0) translation=(-0.0469 0.012 0.024) quadrant=all
          radius=0.02 length=0.15
      WrapEllipsoid Thorax: xyz_body_rotation=(0.0434587 -0.331962 0.189892) translation=(-0.0386 -0.1273 0.0709)
          dimensions=(0.1 0.135 0.08)
      WrapEllipsoid ThoraxSRA: xyz_body_rotation=(0 -0.331962 0.139892) translation=(-0.0386 -0.0933 0.065)
          dimensions=(0.05 0.1 0.065)
      WrapEllipsoid ThoraxSRA2: xyz_body_rotation=(0 -0.431962 0.139892) translation=(-0.0256 -0.1173 0.085)
          dimensions=(0.075 0.11 0.065)
      WrapEllipsoid ThoraxLAT: xyz_body_rotation=(0 -0.431962 0.139892) translation=(-0.0336 -0.143 0.065)
          dimensions=(0.075 0.11 0.065)
    Body clavicle: mass=0.2 mass_center=(-0.0127205 0.00849541 0.0659846) inertia_xx=0 inertia_yy=0 inertia_zz=0
        meshes=clavicle.vtp
      CustomJoint SCJ: parent_body=thorax location_in_parent=(0.006325 0.00693 0.025465) location=(0 0 0)
        Coordinate sternoclavicular_r1: motion_type=rotational default_value=0 range=(-1.570796 1.570796) clamped=false
        Coordinate sternoclavicular_r2: motion_type=rotational default_value=0 range=(-1.570796 1.570796) clamped=false
        Coordinate sternoclavicular_r3: motion_type=rotational default_value=0 range=(-1.570796 1.570796) clamped=false
            locked=true
        SpatialTransform: axes_held_at_zero=(translation1 translation2 translation3)
          TransformAxis rotation1: coordinates=sternoclavicular_r1 axis=(0.0153 0.9892987 -0.1451)
              LinearFunction(coefficients=1 0)
          TransformAxis rotation2: coordinates=sternoclavicular_r2 axis=(-0.9944725 0 -0.104997)
              LinearFunction(coefficients=1 0)
          TransformAxis rotation3: coordinates=sternoclavicular_r3 axis=(-0.103812 0.145416 0.9839092)
              LinearFunction(coefficients=1 0)
    Body scapula: mass=0.5 mass_center=(-0.072 -0.039 -0.065) inertia_xx=0 inertia_yy=0 inertia_zz=0 meshes=scapula.vtp
      CustomJoint ACJ: parent_body=clavicle location_in_parent=(-0.01433 0.02007 0.135535)
          orientation_in_parent=(-0.52 0.52 0) location=(0 0 0) orientation=(-0.52 0.52 0)
        Coordinate Acromioclavicular_r1: motion_type=rotational default_value=0 range=(-1.570796 1.570796)
            clamped=false
        Coordinate Acromioclavicular_r2: motion_type=rotational default_value=0 range=(-1.570796 1.570796)
            clamped=false
        Coordinate Acromioclavicular_r3: motion_type=rotational default_value=0 range=(-1.570796 1.570796)
            clamped=false
        SpatialTransform: axes_held_at_zero=(translation1 translation2 translation3)
          TransformAxis rotation1: coordinates=Acromioclavicular_r1 axis=(0 0 1) LinearFunction(coefficients=1 0)
          TransformAxis rotation2: coordinates=Acromioclavicular_r2 axis=(0 1 0) LinearFunction(coefficients=1 0)
          TransformAxis rotation3: coordinates=Acromioclavicular_r3 axis=(-1 0 0) LinearFunction(coefficients=1 0)
      WrapTorus INFSP: xyz_body_rotation=(0.0253073 0.58835 0.151844) translation=(-0.0561 -0.0199 -0.0112)
          active=false inner_radius=0.008 outer_radius=0.019
      WrapEllipsoid TMIN: xyz_body_rotation=(-2.09754 -0.280823 -1.76348) translation=(-0.0418 -0.0519 -0.0359)
          quadrant=x dimensions=(0.03 0.03 0.05)
      WrapCylinder TRIlongglen: xyz_body_rotation=(1.37532 -0.294612 2.43596) translation=(-0.0359 -0.0309 -0.0132)
          quadrant=x radius=0.003 length=0.03
    Body humerus: mass=2.0325 mass_center=(0 -0.164502 0) inertia_xx=0.011946 inertia_yy=0.004121 inertia_zz=0.013409
        meshes=humerus.vtp
      CustomJoint GHJ: parent_body=scapula location_in_parent=(-0.00955 -0.034 0.009) location=(0 0 0)
        Coordinate shoulder_plane: motion_type=rotational default_value=-1.5708 default_speed_value=5.342924e-15
            range=(-1.9 0.35) clamped=true
        Coordinate shoulder_ele: motion_type=rotational default_value=0 range=(-0.3 3) clamped=true
        Coordinate shoulder_rotation: motion_type=rotational default_value=1.5708 default_speed_value=1.000209e-14
            range=(0 3) clamped=true
        SpatialTransform: axes_held_at_zero=(translation1 translation2 translation3)
          TransformAxis rotation1: coordinates=shoulder_plane axis=(0.0001 1 0.0001) LinearFunction(coefficients=1 0)
          TransformAxis rotation2: coordinates=shoulder_ele axis=(0 0 1) LinearFunction(coefficients=1 0)
          TransformAxis rotation3: coordinates=shoulder_rotation axis=(0 1 0) LinearFunction(coefficients=1 0)
      WrapEllipsoid SUPSP: xyz_body_rotation=(0.0380482 0.00855211 -1.30673) translation=(0.0002 0.0077 0.0043)
          quadrant=all dimensions=(0.02 0.02 0.02)
      WrapEllipsoid INFSP_and_TMIN_hum_head: xyz_body_rotation=(-0.286583 -0.00907571 -0.0684169)
          translation=(-0.0003 0.0026 0.0038) quadrant=all dimensions=(0.02 0.025 0.02)
      WrapCylinder TMINhum: xyz_body_rotation=(1.75353 0.0692896 2.74628) translation=(-0.0014 -0.0455 0) quadrant=x
          radius=0.007 length=0.07
      WrapSphere TMAJ_LAT_PEC_CORBhh: translation=(0.0003 -0.009 0.006) quadrant=all radius=0.0245
      WrapCylinder TMAJ_LAThum: xyz_body_rotation=(1.53641 -0.0637045 1.41424) translation=(0.0007 -0.0443 -0.0055)
          quadrant=-x radius=0.007 length=0.04
      WrapEllipsoid PEC1hh: xyz_body_rotation=(-0.620465 -0.310494 0.363727) translation=(-0.0037 0.0005 -0.0025)
          dimensions=(0.03 0.02 0.02)
      WrapCylinder PEC12hum: xyz_body_rotation=(1.55928 -0.0774926 -0.925897) translation=(0.002 -0.0508 -0.0017)
          quadrant=x radius=0.009 length=0.07
      WrapSphere PEC23hh: translation=(-0.0086 0.0021 -0.0004) quadrant=all radius=0.02
      WrapCylinder PEC3hum: xyz_body_rotation=(1.44094 -0.0561996 1.75196) translation=(0.0009 -0.0551 -0.0004)
          quadrant=-x radius=0.008 length=0.07
      WrapCylinder LAT_TMAJhh: xyz_body_rotation=(-0.305084 -0.018326 -0.686613) translation=(-0.0224 0.0102 0.0094)
          quadrant=-y radius=0.007 length=0.045
      WrapSphere LAT_TMAJ2hh: xyz_body_rotation=(-0.127235 0.276111 0.0197222) translation=(-0.0016 0.0092 0.0052)
          quadrant=-z radius=0.03
      WrapCylinder CORBhum: xyz_body_rotation=(-1.60832 0.0959931 0.875283) translation=(0.0027 -0.1202 -0.0059)
          quadrant=x radius=0.008 length=0.05
      WrapEllipsoid TRIlonghh: xyz_body_rotation=(3.00162 -0.853466 2.57419) translation=(-0.0078 -0.0041 -0.0014)
          quadrant=z dimensions=(0.035 0.02 0.02)
      WrapCylinder TRI: xyz_body_rotation=(-0.14015 -0.00628319 0.154985) translation=(0.0028 -0.2919 -0.0119)
          quadrant=all radius=0.016 length=0.04
      WrapEllipsoid ANC: xyz_body_rotation=(0.00750492 -0.196699 1.04929) translation=(0.0134 -0.2861 -0.0008)
          quadrant=-x dimensions=(0.02 0.02 0.02)
      WrapEllipsoid BIClong: xyz_body_rotation=(-2.00434 -1.00164 0.975465) translation=(0.0033 0.0073 0.0003)
          quadrant=-y dimensions=(0.025 0.02 0.02)
      WrapEllipsoid Elbow_BIC_BRD: xyz_body_rotation=(-0.128631 0.137532 0.0307178) translation=(0.0019 -0.289 -0.014)
          quadrant=x dimensions=(0.015 0.015 0.1)
      WrapEllipsoid Elbow_PT_ECRL: xyz_body_rotation=(-0.161094 -0.110828 0.61453) translation=(0.003 -0.2872 -0.0069)
          quadrant=x dimensions=(0.018 0.025 0.035)
    Body ulna: mass=0.6075 mass_center=(0 -0.120525 0) inertia_xx=0.002962 inertia_yy=0.000618 inertia_zz=0.003213
        meshes=ulna.vtp
      CustomJoint elbow: parent_body=humerus location_in_parent=(0.0061 -0.2904 -0.0123) location=(0 0 0)
        Coordinate elbow_flexion: motion_type=rotational default_value=0 range=(0 2.268928) clamped=true
        SpatialTransform: axes_held_at_zero=(rotation1 rotation2 translation1 translation2 translation3)
          TransformAxis rotation3: coordinates=elbow_flexion axis=(0.04940001 0.03660001 0.9981082)
              LinearFunction(coefficients=1 0)
    Body radius: mass=0.6075 mass_center=(0 -0.120525 0) inertia_xx=0.002962 inertia_yy=0.000618 inertia_zz=0.003213
        meshes=radius.vtp
      CustomJoint radioulnar: parent_body=ulna location_in_parent=(0.0004 -0.011503 0.019999) location=(0 0 0)
        Coordinate pro_sup: motion_type=rotational default_value=0 range=(-1.570796 1.570796) clamped=true
        SpatialTransform: axes_held_at_zero=(rotation1 rotation3 translation1 translation2 translation3)
          TransformAxis rotation2: coordinates=pro_sup axis=(-0.01716099 0.9926656 -0.119668)
              LinearFunction(coefficients=1 0)
    Body hand_r: mass=0.4575 mass_center=(0 -0.068095 0) inertia_xx=0.000892 inertia_yy=0.000547 inertia_zz=0.00134
        meshes=(pisiform.vtp lunate.vtp scaphoid.vtp triquetrum.vtp hamate.vtp capitate.vtp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)
      WeldJoint radius_hand_r: parent_body=radius location_in_parent=(0.0171149 -0.2301003 0.02377069) location=(0 0 0)
      WrapTorus ECRL: xyz_body_rotation=(1.53833 0.234398 0.731118) translation=(0.0222 -0.0096 0.0208) quadrant=all
          inner_radius=0.008 outer_radius=0.016
      WrapTorus ECRB: xyz_body_rotation=(1.31266 -0.11781 -0.116239) translation=(0.0126 -0.0095 0.0186) quadrant=all
          inner_radius=0.008 outer_radius=0.01
      WrapTorus FCR: xyz_body_rotation=(-1.55596 -0.15324 -0.100007) translation=(0.0032 -0.0045 -0.019) quadrant=all
          inner_radius=0.001 outer_radius=0.0025
      WrapTorus FCU: xyz_body_rotation=(-1.57376 -0.0797616 0.39235) translation=(-0.0123 -0.0124 -0.0171) quadrant=all
          inner_radius=0.0068 outer_radius=0.008
  ForceSet:
    Thelen2003Muscle LVS: max_isometric_force=169.9564 optimal_fiber_length=0.1475444 tendon_slack_length=0.005216811
        pennation_angle_at_optimal=0
      PathPoint DELT2-P2: thorax (-0.037263 0.0944378 0.0225438)
      PathPoint DELT2-P3: scapula (-0.0676471 0.000672336 -0.0956535)
    Thelen2003Muscle TRP1: max_isometric_force=280.5671 optimal_fiber_length=0.1031903 tendon_slack_length=0.01545641
        pennation_angle_at_optimal=0
      PathPoint DELT2-P2: thorax (-0.0589601 0.0968498 0.00192477)
      PathPoint DELT2-P3: clavicle (-0.0305978 0.0248459 0.0982569)
      PathWrap: wrap_object=SpineCyl
    Thelen2003Muscle TRP2: max_isometric_force=162.45 optimal_fiber_length=0.08811549 tendon_slack_length=0.04421835
        pennation_angle_at_optimal=0
      PathPoint DELT2-P2: thorax (-0.0774721 0.0314578 0.00356913)
      PathPoint DELT2-P3: scapula (-0.039 -0.0025817 -0.01)
      PathWrap: wrap_object=SpineCyl2
    Thelen2003Muscle TRP3: max_isometric_force=155.2832 optimal_fiber_length=0.08115766 tendon_slack_length=0.01974327
        pennation_angle_at_optimal=0
      PathPoint DELT2-P2: thorax (-0.0921656 -0.0154049 0.00250602)
      PathPoint DELT2-P3: scapula (-0.058344 -0.00650954 -0.0444157)
    Thelen2003Muscle TRP4: max_isometric_force=557.2435 optimal_fiber_length=0.1282127 tendon_slack_length=0.005
        pennation_angle_at_optimal=0
      PathPoint DELT2-P2: thorax (-0.115981 -0.105564 0.000683625)
      PathPoint DELT2-P3: scapula (-0.0791919 -0.0129439 -0.0789001)
      PathWrap: wrap_object=SpineCyl3 method=hybrid
    Thelen2003Muscle RMN: max_isometric_force=301.6171 optimal_fiber_length=0.1072817 tendon_slack_length=0.02297276
        pennation_angle_at_optimal=0
      PathPoint DELT2-P2: thorax (-0.063 0.0559617 0.003)
      PathPoint DELT2-P3: scapula (-0.079057 -0.0131532 -0.100259)
      PathWrap: wrap_object=SpineCyl2
    Thelen2003Muscle RMJ1: max_isometric_force=185.9359 optimal_fiber_length=0.08855123 tendon_slack_length=0.02438303
        pennation_angle_at_optimal=0
      PathPoint DELT2-P2: thorax (-0.0790589 0.00944004 0.00143378)
      PathPoint DELT2-P3: scapula (-0.0903423 -0.0422644 -0.104178)
      PathWrap: wrap_object=SpineCyl3
    Thelen2003Muscle RMJ2: max_isometric_force=111.5701 optimal_fiber_length=0.08816437 tendon_slack_length=0.04599265
        pennation_angle_at_optimal=0
      PathPoint DELT2-P2: thorax (-0.087 -0.025 0.00143378)
      PathPoint DELT2-P3: scapula (-0.1 -0.099 -0.097)
      PathWrap: wrap_object=SpineCyl3
    Thelen2003Muscle SRA1: max_isometric_force=365.1178 optimal_fiber_length=0.08520897 tendon_slack_length=0.06980062
        pennation_angle_at_optimal=0
      PathPoint DELT2-P2: thorax (-0.000944031 -0.0561663 0.119819)
      PathPoint DELT2-P3: scapula (-0.0878498 -0.0472465 -0.0985756)
      PathWrap: wrap_object=ThoraxSRA method=hybrid
    Thelen2003Muscle SRA2: max_isometric_force=179.9626 optimal_fiber_length=0.1280565 tendon_slack_length=0.04209872
        pennation_angle_at_optimal=0
      PathPoint DELT2-P2: thorax (-0.000625923 -0.102011 0.137825)
      PathPoint DELT2-P3: scapula (-0.0931001 -0.0622901 -0.0985183)
      PathWrap: wrap_object=ThoraxSRA method=hybrid
    Thelen2003Muscle SRA3: max_isometric_force=377.9217 optimal_fiber_length=0.1331404 tendon_slack_length=0.008758465
        pennation_angle_at_optimal=0
      PathPoint DELT2-P2: thorax (-0.0113734 -0.161817 0.148868)
      PathPoint DELT2-P3: scapula (-0.0968835 -0.0774188 -0.0982424)
      PathWrap: wrap_object=ThoraxSRA2 method=hybrid
    Thelen2003Muscle SBCL: max_isometric_force=195.8076 optimal_fiber_length=0.02413815 tendon_slack_length=0.04401093
        pennation_angle_at_optimal=0
      PathPoint DELT2-P2: thorax (-0.000927862 -0.013199 0.0391262)
      PathPoint DELT2-P3: clavicle (-0.0157477 0.00908546 0.0757093)
    Thelen2003Muscle PMN: max_isometric_force=218.7229 optimal_fiber_length=0.1150697 tendon_slack_length=0.005
        pennation_angle_at_optimal=0
      PathPoint P1: scapula (0.012 -0.04127 -0.02652)
      PathPoint P2: thorax (0.032445 -0.0750782 0.0894181)
    Thelen2003Muscle DELT1: max_isometric_force=556.8 optimal_fiber_length=0.1752 tendon_slack_length=0.0313
        pennation_angle_at_optimal=0.3839724
      PathPoint P1: humerus (0.00455911 -0.103949 0.00775516)
      PathPoint P3: clavicle (-0.00230674 0.0315051 0.130618)
      PathPoint P4: clavicle (-0.0241685 0.0192842 0.099015)
    Thelen2003Muscle DELT2: max_isometric_force=1098.4 optimal_fiber_length=0.1318 tendon_slack_length=0.0467
        pennation_angle_at_optimal=0.2617994
      PathPoint P1: humerus (0.00455911 -0.103949 0.00775516)
      PathPoint default: humerus (-0.00350025 -0.0579479 0.0283611)
      PathPoint P3: scapula (-0.0276421 -0.00483948 0.0183611)
      PathPoint P3: scapula (-0.0275294 -0.0032022 0.00142634)
    Thelen2003Muscle DELT3: max_isometric_force=944.7 optimal_fiber_length=0.1228 tendon_slack_length=0.0975
        pennation_angle_at_optimal=0.3141593
      PathPoint P1: scapula (-0.0590625 -0.00156871 -0.0384606)
      PathPoint P2: scapula (-0.0721881 -0.0237201 0.00597728)
      PathPoint P2: humerus (-0.0185845 -0.049702 0.00590064)
      PathPoint P3: humerus (0.00455911 -0.103949 0.00775516)
    Thelen2003Muscle SUPSP: max_isometric_force=410.7 optimal_fiber_length=0.1165 tendon_slack_length=0.0248
        pennation_angle_at_optimal=0.122173
      PathPoint P1: humerus (0.0142549 0.0168443 0.0209438)
      PathPoint P2: humerus (0.0035658 0.0312313 0.0055175)
      PathPoint P2: scapula (-0.0561797 -0.00133709 -0.0407038)
      PathPoint P3: scapula (-0.0670398 -0.0115895 -0.0644974)
      PathWrap: wrap_object=SUPSP method=hybrid
    Thelen2003Muscle INFSP: max_isometric_force=864.6 optimal_fiber_length=0.1323 tendon_slack_length=0.0337
        pennation_angle_at_optimal=0.3228859
      PathPoint P1: humerus (-0.00509757 0.00804087 0.0263967)
      PathPoint P2: scapula (-0.0426639 -0.0484855 -0.0219049)
      PathPoint P3: scapula (-0.087985 -0.0545528 -0.0693532)
      PathWrap: wrap_object=INFSP
      PathWrap: wrap_object=INFSP_and_TMIN_hum_head method=hybrid
    Thelen2003Muscle SUBSC: max_isometric_force=944.3 optimal_fiber_length=0.1632 tendon_slack_length=0.0075
        pennation_angle_at_optimal=0.3490659
      PathPoint P1: humerus (0.0199995 -0.00831173 -0.00174873)
      PathPoint P2: humerus (0.00743143 0.0103746 -0.0226855)
      PathPoint default: scapula (-0.0391088 -0.032288 -0.0333714)
      PathPoint P3: scapula (-0.072 -0.039 -0.065)
    Thelen2003Muscle TMIN: max_isometric_force=605.4 optimal_fiber_length=0.0453 tendon_slack_length=0.1038
        pennation_angle_at_optimal=0.418879
      PathPoint P1: humerus (0.00655633 -0.00365417 0.0216781)
      PathPoint P1: humerus (-0.00847731 -0.0141768 0.0268849)
      PathPoint P2: scapula (-0.0750189 -0.0526508 -0.0102678)
      PathPoint P3: scapula (-0.0820004 -0.0674811 -0.0409306)
    Thelen2003Muscle TMAJ: max_isometric_force=234.9 optimal_fiber_length=0.1388 tendon_slack_length=0.0537
        pennation_angle_at_optimal=0.2792527
      PathPoint P1: humerus (0.003699 -0.045 -0.00676304)
      PathPoint default: scapula (-0.0453519 -0.106216 -0.00247153)
      PathPoint P3: scapula (-0.104709 -0.107757 -0.0711555)
    Thelen2003Muscle PECM1: max_isometric_force=983.4 optimal_fiber_length=0.1025 tendon_slack_length=0.048
        pennation_angle_at_optimal=0.296706
      PathPoint P1: humerus (0.016 -0.0404957 0.005)
      PathPoint P2: clavicle (-0.000485828 0.00557039 0.0591605)
      PathPoint P3: clavicle (0.00110542 0.00608334 0.0513213)
    Thelen2003Muscle PECM2: max_isometric_force=699.7 optimal_fiber_length=0.14 tendon_slack_length=0.0955
        pennation_angle_at_optimal=0.4363323
      PathPoint P1: humerus (0.016 -0.0354957 0.005)
      PathPoint P2: thorax (0.0423172 -0.0434712 0.0808125)
      PathPoint default: thorax (0.0248658 -0.0475832 0.0174664)
    Thelen2003Muscle PECM3: max_isometric_force=446.7 optimal_fiber_length=0.1813 tendon_slack_length=0.0988
        pennation_angle_at_optimal=0.4363323
      PathPoint P1: humerus (0.016 -0.03 0.005)
      PathPoint P2: thorax (0.0432682 -0.093061 0.082833)
      PathPoint P2: thorax (0.0626543 -0.147759 0.0220602)
    Thelen2003Muscle LAT: max_isometric_force=1129.7 optimal_fiber_length=0.2317 tendon_slack_length=0.077
        pennation_angle_at_optimal=0.3316126
      PathPoint LAT2-P1: humerus (0.00991752 -0.0223337 -0.008822)
      PathPoint P2: humerus (0.00202133 -0.0188908 -0.0214651)
      PathPoint LAT2-P2: thorax (-0.094702 -0.160998 0.000512144)
      PathWrap: wrap_object=ThoraxLAT method=hybrid
    Thelen2003Muscle CORB: max_isometric_force=306.9 optimal_fiber_length=0.0832 tendon_slack_length=0.0615
        pennation_angle_at_optimal=0
      PathPoint P1: scapula (0.0125 -0.04127 -0.02652)
      PathPoint P3: humerus (0 -0.128 -0.0116594)
      PathWrap: wrap_object=CORBhum
      PathWrap: wrap_object=TMAJ_LAT_PEC_CORBhh
    ObjectGroup Scapulothoracic: members=(SBCL SRA1 SRA2 SRA3 TRP1 TRP2 TRP3 TRP4 LVS RMN RMJ1 RMJ2 PMN)
    ObjectGroup Glenohumeral: members=(DELT1 DELT2 DELT3 INFSP LAT PECM1 PECM2 PECM3 SUBSC SUPSP TMAJ TMIN CORB)
  MarkerSet:
    Marker IJ: thorax (0.02 0 0)
    Marker PX: thorax (0.0849841 -0.168495 0)
    Marker C7: thorax (-0.0998989 0.0387645 0)
    Marker T8: thorax (-0.124781 -0.122206 0)
    Marker EL: humerus (-0.00946494 -0.273487 0.0307692)
    Marker EM: humerus (0.0118839 -0.289721 -0.049108)
    Marker RS: radius (0.0519996 -0.231152 0.0207237)
    Marker US: ulna (-0.0125907 -0.243095 0.0487031)
    Marker AI: scapula (-0.126717 -0.125 -0.0771196)
    Marker TS: scapula (-0.0984639 -0.0120154 -0.0964229)
    Marker Acrom: scapula (-0.0117397 0.0154095 -0.001193)
    Marker RibL: thorax (-0.037349 -0.265777 -0.138098)
    Marker AA: scapula (-0.0616053 0 -0.0125286)
    Marker elb_out: humerus (-0.03532 -0.277505 -0.0154461)
    Marker elb_in: humerus (0.046129 -0.278434 0.00161575)
    Marker wri_out: radius (0.0219753 -0.229644 0.0502777)
    Marker GH: humerus (0 0 0)
    Marker Elb: ulna (0 0 0)
